x
1.
Given
y(x) := x^3 - 2*x^2 + x - 3
2.
x^3 - 2*x^2 + x - 3 == 0
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x^3 - 2*x^2 + x - 3 solve, x → [
    (3*(sqrt(77)/6 + 79/54)^(1/3) + 1)^2/(9*(sqrt(77)/6 + 79/54)^(1/3));
    -(9*(79*sqrt(77)/162 + 6239/1458)^(1/3) - 12*(sqrt(77)/6 + 79/54)^(1/3) + 1 - 9i*sqrt(3)*(79*sqrt(77)/162 + 6239/1458)^(1/3) + sqrt(3)*1i)/(18*(sqrt(77)/6 + 79/54)^(1/3));
    -(9*(79*sqrt(77)/162 + 6239/1458)^(1/3) - 12*(sqrt(77)/6 + 79/54)^(1/3) + 1 - sqrt(3)*1i + 9i*sqrt(3)*(79*sqrt(77)/162 + 6239/1458)^(1/3))/(18*(sqrt(77)/6 + 79/54)^(1/3))
]
Find(x) → [(3*(sqrt(77)/6 + 79/54)^(1/3) + 1)^2/(9*(sqrt(77)/6 + 79/54)^(1/3)), -(9*(79*sqrt(77)/162 + 6239/1458)^(1/3) - 12*(sqrt(77)/6 + 79/54)^(1/3) + 1 - 9i*sqrt(3)*(79*sqrt(77)/162 + 6239/1458)^(1/3) + sqrt(3)*1i)/(18*(sqrt(77)/6 + 79/54)^(1/3)), -(9*(79*sqrt(77)/162 + 6239/1458)^(1/3) - 12*(sqrt(77)/6 + 79/54)^(1/3) + 1 - sqrt(3)*1i + 9i*sqrt(3)*(79*sqrt(77)/162 + 6239/1458)^(1/3))/(18*(sqrt(77)/6 + 79/54)^(1/3))]
i := 1 .. 10
x[0] := 1
x[i + 1] := x[i] - (x[i]^3 - 2*x[i]^2 + x[i] - 3)/(3*x[i]^2 - 4*x[i] + 1)  # error: Индекс массива является недопустимым для этого массива.
3.
i := 0 .. 10
x[i] := i
F[i] := y(x[i])
4.
x = [0; 1; 2; 3; 4; 5; 6; 7; 8; 9; 10]
x = [0; 1; 2; 3; 4; 5; 6; 7; 8; 9; 10]
F = [-3; -3; -1; 9; 33; 77; 147; 249; 389; 573; 807]
